*RESTART,READ

*AMPLITUDE,NAME=AMP2
0,0
1,1

*STEP,NLGEOM,INC=1000000
*DYNAMIC
0.01, 5
*BOUNDARY,FIXED
**INCLUDE,INPUT=Solid/boundary-restart.inp
**BOUNDARY,OP=NEW
*Nfix1,1,1,0
*Nfix1,2,2,0
*Nfix1,3,3,0
*CLOAD,AMPLITUDE=AMP2
**CLOAD
Nsurface, 1, 0.0
Nsurface, 2, 10
Nsurface, 3, 0.0
*NODE PRINT,NSET=probe
U
**NODE PRINT,NSET=Nfix1
**U
**NODE PRINT,NSET=Nsurface
**U
*NODE FILE
U
*EL FILE
S
*END STEP
